// SBML level 3 version 1

model EnzymaticReaction()
  // model units - substance: substance, time: second, volume: volume, area: area, length: metre, extent: substance

  // Compartments:
  compartment cytosol = 1e-14 volume;

  // Species:
  species ES in cytosol = 0;
  species P in cytosol = 0;
  species S in cytosol = 1e-20/cytosol;
  species E in cytosol = 5e-21/cytosol;

  // Reactions:
  veq: E + S -> ES; cytosol*(kon*E*S - koff*ES);
    kon = 1000000 litre_per_mole_per_second; koff = 0.2 per_second;
  vcat: ES => E + P; cytosol*kcat*ES;
    kcat = 0.1 per_second;

  // Unit definitions:
  unit per_second = 1 / second;
  unit litre_per_mole_per_second = litre / (mole * second);
  unit volume = litre;
  unit substance = mole;
  unit area = metre^2;
end
